f(x) := 0
n := 6
f(x) := x^3 + (4 - n)*x^2 + (3 - 4*n)*x - 3*n
V := [3*n; 3 - 4*n; 4 - n; 1]
X := polyroots(V)
X = [-4.13366; 0.819397; 5.31427]
g(i, j) := i + j*2
b := matrix(3, 3, g) = [0, 2, 4; 1, 3, 5; 2, 4, 6]
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