Xa := -2
Xb := -3
Xc := 0
Xd := 3
Xe := 2
Xf := -2
Xg := 2
Ya := -4
Yb := 0
Yc := 4
Yd := 0
Ye := -4
Yf := 0
Yg := 0
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Xlw := 100
Xhw := 400
Ylw := 200
Yhw := 500
Zx := transpose([Xa, Xb, Xc, Xd, Xe, Xf, Xg])
Zy := transpose([Ya, Yb, Yc, Yd, Ye, Yf, Yg])
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Xl := min(Zx) = -3
Yh := max(Zy) = 4  # Левый угол в МСК
Xh := max(Zx) = 3
Yl := min(Zy) = -4  # Правый угол в МСК
# Вычисляем параметры, необходимые для формирования матрицы пересчета координат
# из МСК в ОСК:
ΔXw := Xhw - Xlw
ΔXw = 300  # <—Ширина области отображения в ОСК
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Δx := Xh - Xl
Δx = 6  # <—в МСК
ΔYw := Yhw - Ylw
ΔYw = 300  # <—Высота области отображения в ОСК
Δy := Yh - Yl
Δy = 8  # <—в МСК
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Kx := ΔXw/Δx
Kx = 50
Ky := ΔYw/Δy
Ky = 37.5
Tsw := [Kx, 0, Xlw - Kx*Xl; 0, -Ky, Yhw + Ky*Yl; 0, 0, 1]  # <—матрица пересчета из МСК в ОСК
# Вычисляем координаты вершины в ОСК
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[Xaw; Yaw; q] := Tsw*[Xa; Ya; 1]
[Xaw; Yaw; q] = [150; 500; 1]
[Xbw; Ybw; q] := Tsw*[Xb; Yb; 1]
[Xbw; Ybw; q] = [100; 350; 1]
[Xcw; Ycw; q] := Tsw*[Xc; Yc; 1]
[Xcw; Ycw; q] = [250; 200; 1]
[Xdw; Ydw; q] := Tsw*[Xd; Yd; 1]
[Xdw; Ydw; q] = [400; 350; 1]
[Xew; Yew; q] := Tsw*[Xe; Ye; 1]
[Xew; Yew; q] = [350; 500; 1]
[Xfw; Yfw; q] := Tsw*[Xf; Yf; 1]
[Xfw; Yfw; q] = [150; 350; 1]
[Xgw; Ygw; q] := Tsw*[Xg; Yg; 1]
[Xgw; Ygw; q] = [350; 350; 1]
X := transpose([Xb, Xc, Xd, Xb, Xf, Xa, Xe, Xg, Xd])
Y := transpose([Yb, Yc, Yd, Yb, Yf, Ya, Ye, Yg, Yd])
Xw := transpose([Xbw, Xcw, Xdw, Xbw, Xfw, Xaw, Xew, Xgw, Xdw])
Yw := -transpose([Ybw, Ycw, Ydw, Ybw, Yfw, Yaw, Yew, Ygw, Ydw])
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