n := 5
a := -3*n
b := 3*n
a = -15
b = 15
A := runif(3, a, b)
# B=runif (3,а,b)
B := runif(3, a, b)
C := runif(3, a, b)
# C=runif (3,а,b)
A = [-14.9619; -9.20031; 2.55018]
B = [-4.49076; 9.68513; -9.77613]
C = [6.31486; -5.88042; -12.2577]
s := A*B
V := B×C
V = [-176.205; -116.781; -34.7527]
s = -46.8467
w := (A×B)*C
w = 3622.16
filename1 := "Test..txt"
dA := sqrt(A[0]^2 + A[1]^2 + A[2]^2)
dB := sqrt(B[0]^2 + B[1]^2 + B[2]^2)
WRITEPRN(filename1) := V
dC := sqrt(C[0]^2 + C[1]^2 + C[2]^2)
g(i, j) := i + j*2
dA = 17.7485
dB = 14.4755
v := matrix(4, 1, g) = [0; 1; 2; 3]
dC = 14.9902
Array := [dA; dB; dC]
MaxValue := max(Array)
MaxValue = 17.7485
