A := [2, 8, 5; 1, 10, 5; 9, 9, 3]
B := [5, 6, 6; 2, 8, 2; 2, 6, 3]
V[1] := [8; 7; 2]
V[2] := [5; 3; 4]
PView := [3; 3; 2]
V[3] := [0; 0; 0]
p := transpose(V[1])*A*V[2]
C[2] := A*B
D := A*V[1]
q := transpose(V[1])*V[2]
C[1] := A + B
q = 69
p = 985
C[1] = [7, 14, 11; 3, 18, 7; 11, 15, 6]
C[2] = [36, 106, 43; 35, 116, 41; 69, 144, 81]
D = [82; 88; 141]
# Векторное произведение V_1 и V_2 | Скалярное произведение V_1 и V_2
V[1]*V[2] = 69
V[1]×V[2] = [22; -22; -11]
# Косинус между V_1 и V_2 | Преобразует сфер. координаты PView в декартовые
# Модуль вектора V_1
R[0] := PView[0]*cos(PView[1])*sin(PView[2])
|V[1]| = 10.8167
Cos := V[1]*V[2]/(|V[1]|*|V[2]|)
R[1] := PView[0]*sin(PView[1])*sin(PView[2])
Cos = 0.902134
R[2] := PView[0]*cos(PView[2])
R = [-2.70059; 0.38496; -1.24844]
