# --------------------- Задание 1 ---------------------
# Задаем координаты вершин пирамиды и положения камеры:
PIR := [0, 0, 3, 0, 0, 1; 3, 0, 0, 1, 0, 0; 0, 0, 0, 3, 3, 3; 1, 1, 1, 1, 1, 1]
PV := [10; 315; 45]
# Получаем сферические координаты точки наблюдения:
r_v := PV[0] = 10
ϕ_v := PV[1]*π/180 = 5.49779
θ_v := PV[2]*π/180 = 0.785398
# --------------------- Задание 2 ---------------------
# Задаем область отображения графика в окне Windows
x_LW := 200
y_LW := 100  # – левый верхний угол области отображения
x_HW := 700
y_HW := 500  # – правый нижний угол области отображения
# Видовая система координат - СК, которая связана с точкой наблюдения (в нашем случае, с камерой)
# Формируем матрицу пересчета мировых координат в видовые
# Рассказать про то, как эту матрицу вывести, что это произведение 4ёх матриц (метода с.127)
# *про матрицы нужно говорить с конца, поэтому ниже будут перечисляться матрицы справа налево*
# 1 матрица - переход к нашей камере
# 2 матрица - поворот по оси X (используется угол тета)
# 3 матрица - поворот по оси Z (используется угол фи)
# 4 матрица - перевод из Х в -Х
K_view := [
    -sin(ϕ_v), cos(ϕ_v), 0, 0;
    -cos(θ_v)*cos(ϕ_v), -cos(θ_v)*sin(ϕ_v), sin(θ_v), 0;
    -sin(θ_v)*cos(ϕ_v), -sin(θ_v)*sin(ϕ_v), -cos(θ_v), r_v;
    0, 0, 0, 1
]
# Вычисляем координаты вершин пирамиды в видовой системе координат (ВСК)
PIR_V := K_view*PIR
# Определяем координаты проекции вершин пирамиды на картинную плоскость
P_XY := stack(transpose(transpose(PIR_V)[:, 0]), transpose(transpose(PIR_V)[:, 1]), transpose(transpose(PIR_V)[:, 3]))
# Определяем габаритную область проекции пирамиды на плоскость XY ВСК – картинную плоскость
x_L := min(transpose(P_XY)[:, 0])
y_H := max(transpose(P_XY)[:, 1])
# – левый верхний угол
x_L = 0
y_H = 2.62132
x_H := max(transpose(P_XY)[:, 0])
y_L := min(transpose(P_XY)[:, 1])
# – правый нижний угол
x_H = 2.12132
y_L = -1.5
# Вычисляем параметры, необходимые для формирования матрицы пересчета координат из плоскости XY ВСК в ОК
Δx_W := x_HW - x_LW
Δx_W = 500
Δx := x_H - x_L
Δx = 2.12132
Δy_W := y_HW - y_LW
Δy_W = 400
Δy := y_H - y_L
Δy = 4.12132
k_x := Δx_W/Δx
k_x = 235.702
k_y := Δy_W/Δy
k_y = 97.0563
T_SW := [k_x, 0, x_LW - k_x*x_L; 0, -k_y, y_HW + k_y*y_L; 0, 0, 1] = [235.702, 0, 200; 0, -97.0563, 354.416; 0, 0, 1]  # – матрица пересчета из ВСК в ОСК
# Вычисляем оконные координаты вершин пирамиды
M_W := T_SW*P_XY
[x_a, x_b, x_c, x_d, x_e, x_f; y_a, y_b, y_c, y_d, y_e, y_f; q, q, q, q, q, q] := vectorize(round(M_W)) = [700, 200, 700, 367, 200, 367; 209, 354, 500, 100, 149, 197; 1, 1, 1, 1, 1, 1]
# Формируем массивы координат X и Y для рисования пирамиды
X := transpose([x_a, x_b, x_c, x_a, x_d, x_e, x_b, x_e, x_f, x_c, x_f, x_d])
Y := -transpose([y_a, y_b, y_c, y_a, y_d, y_e, y_b, y_e, y_f, y_c, y_f, y_d])
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# Задаем область отображения графика в окне Windows
# Формируем матрицу пересчета мировых координат в видовые
# Вычисляем координаты вершин пирамиды в видовой системе координат (ВСК)
# Определяем координаты проекции вершин пирамиды на картинную плоскость
# --------------------- Задание 3 ---------------------  (то, что написано справа, берем с прошлого задания)
# Определяем габаритную область проекции пирамиды на плоскость XY ВСК – картинную плоскость
# Вычисляем параметры, необходимые для формирования матрицы пересчета координат из плоскости XY ВСК в ОК
R_C := [r_v*sin(θ_v)*cos(ϕ_v); r_v*sin(θ_v)*sin(ϕ_v); r_v*cos(θ_v)] = [5; -5; 7.07107]
# – матрица пересчета из ВСК в ОК
# Вычисляем оконные координаты вершин пирамиды
A := [3; 0; 0]
D := [1; 0; 3]
C := [0; 3; 0]
AC := C - A = [-3; 3; 0]
AD := D - A = [-2; 0; 3]
N_AB1C := AC×AD = [9; 9; 6]
N_ABB1 := [0; -1; 0]
N_ABC := [0; 0; -1]
N_CBB1 := [-1; 0; 0]
N_A1B1C1 := [0; 0; 1]
q1 := R_C*N_AB1C = 42.4264
s1 := if(q1 ≥ 0, "Грань AB1C видима", "Грань AB1C невидима") = "Грань AB1C видима"
q1 := R_C*N_ABB1 = 5
s1 := if(q1 ≥ 0, "Грань ABB1 видима", "Грань ABB1 невидима") = "Грань ABB1 видима"
q1 := R_C*N_ABC = -7.07107
s1 := if(q1 ≥ 0, "Грань ABC видима", "Грань ABC невидима") = "Грань ABC невидима"
q1 := R_C*N_CBB1 = -5
s1 := if(q1 ≥ 0, "Грань CBB1 видима", "Грань CBB1 невидима") = "Грань CBB1 невидима"
q1 := R_C*N_A1B1C1 = 7.07107
s1 := if(q1 ≥ 0, "Грань A1B1C1 видима", "Грань A1B1C1 невидима") = "Грань A1B1C1 видима"
# Формируем массивы координат X и Y для рисования пирамиды
X := transpose([x_e, x_b, x_c, x_f, x_e, x_d, x_f, x_c, x_a, x_d])
Y := -transpose([y_e, y_b, y_c, y_f, y_e, y_d, y_f, y_c, y_a, y_d])
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# --------------------- Задание 4 ---------------------
# Задаем положение секущей плоскости в МСК XYZ
# -угол между осью z и вектором нормали к секущей плоскости
ϕ_grad := 50
ϕ := ϕ_grad/180*π
ϕ = 0.872665  # МСК -> ВСК -> ОСК
# - вектор нормали к секущей плоскости
N := transpose([0, sin(ϕ), cos(ϕ)])
# - координаты точки пересечения оси Z и секущей плоскости
x_0 := 0
y_0 := 0
# вершина D
Z
z_0 := 3/4*PIR[:, 3][2]
3/4  # высота сечения  # почему именно PIR 3 2? (4-ый столбец, 3-ья строка = 3)
z_0 = 2.25
-макс*Z
# Задаем параметры уравнения секущей плоскости
[A; B; C] := N  # здесь А = 0, B = sinф, C = cosф
[A; B; C] = [0; 0.766044; 0.642788]  # по формуле
D := -(A*x_0 + B*y_0 + C*z_0)
D = -1.44627
# Находим точку пересечения P1 секущей плоскости с ребром AD
# параметры субматрикса:
# 1. с какой строки берем
# 2. до какой строки берем
# 3. с какого столбца берем
# 4. до какого столбца берем
[x1; y1; z1] := submatrix(PIR, 0, 2, 0, 0) = [0; 3; 0]
[x2; y2; z2] := submatrix(PIR, 0, 2, 3, 3) = [0; 1; 3]
Δx := x2 - x1
Δy := y2 - y1
Δz := z2 - z1
t_AD1 := -((A*x1 + B*y1 + C*z1 + D)/(A*Δx + B*Δy + C*Δz))
# - параметр, при котором ребро и плоскость имеют общую точку. Если между 0 и 1, то ребро пересекает плоскость
t_AD := 0.3
x_AD := x1 + Δx*t_AD
y_AD := y1 + Δy*t_AD
z_AD := z1 + Δz*t_AD
x_AD = 0
y_AD = 2.4
z_AD = 0.9  # - координаты точки пересечения Р1
# Находим точку пересечения P2 секущей плоскости с ребром CF
# 3 столбец - точка C
V1 := submatrix(PIR, 0, 2, 2, 2) = [3; 0; 0]
V2 := submatrix(PIR, 0, 2, 5, 5) = [1; 0; 3]  # 6 столбец - точка F
# дельта V - сама прямая CF
ΔV := V2 - V1
t_CF := -((N*V1 + D)/(N*ΔV))
V_CF := V1 + ΔV*t_CF
x_CF := V_CF[0]
y_CF := V_CF[1]
z_CF := V_CF[2]  # - координаты точки пересечения Р2
# Находим точку пересечения P3 секущей плоскости с ребром BE
V1 := submatrix(PIR, 0, 2, 1, 1) = [0; 0; 0]
V2 := submatrix(PIR, 0, 2, 4, 4) = [0; 0; 3]
ΔV := V2 - V1
# второй вариант нахождения точек пересечения
t_BE := -((N*V1 + D)/(N*ΔV))
V_BE := V1 + ΔV*t_BE
x_BE := V_BE[0]
y_BE := V_BE[1]
z_BE := V_BE[2]  # - координаты точки пересечения Р3
# Получаем матрицу мировых коорднат точек P1, P2, P3
TR := [x_AD, x_CF, x_BE; y_AD, y_CF, y_BE; z_AD, z_CF, z_BE; 1, 1, 1]
# Задаем область отображения графика в окне Windows
x_LW := 200
y_LW := 100  # – левый верхний угол области отображения
x_HW := 700
y_HW := 500  # – правый нижний угол области отображения
# Формируем матрицу пересчета мировых координат в видовые
K_view := [
    -sin(ϕ_v), cos(ϕ_v), 0, 0;
    -cos(θ_v)*cos(ϕ_v), -cos(θ_v)*sin(ϕ_v), sin(θ_v), 0;
    -sin(θ_v)*cos(ϕ_v), -sin(θ_v)*sin(ϕ_v), -cos(θ_v), r_v;
    0, 0, 0, 1
]  # r.v это первый параметр камеры (10)
# Вычисляем координаты вершин пирамиды в видовой системе координат (ВСК)
PIR_V := K_view*PIR
# Вычисляем координаты вершин треугольника сечения Р1,
# Р2, Р3 в видовой системе координат (ВСК)
TR_V := K_view*TR
# Определяем координаты проекции вершин пирамиды на картинную плоскость
P_XY := stack(transpose(transpose(PIR_V)[:, 0]), transpose(transpose(PIR_V)[:, 1]), transpose(transpose(PIR_V)[:, 3]))
# Определяем координаты проекции вершин треугольника сечения Р1,
# Р2, Р3 на картинную плоскость
# картинная плоскость — плоскость на которую проецируется объект
TR_XY := stack(transpose(transpose(TR_V)[:, 0]), transpose(transpose(TR_V)[:, 1]), transpose(transpose(TR_V)[:, 3]))
# Определяем габаритную область проекции пирамиды на плоскость XY ВСК – картинную плоскость
x_L := min(transpose(P_XY)[:, 0])
y_H := max(transpose(P_XY)[:, 1])
# – левый верхний угол
x_L = 0
y_H = 2.62132
x_H := max(transpose(P_XY)[:, 0])
y_L := min(transpose(P_XY)[:, 1])
# – правый нижний угол
x_H = 2.12132
y_L = -1.5
# Вычисляем параметры, необходимые для формирования матрицы пересчета координат из плоскости XY ВСК в ОК
Δx_W := x_HW - x_LW
Δx_W = 500
Δx := x_H - x_L
Δx = 2.12132
Δy_W := y_HW - y_LW
Δy_W = 400
Δy := y_H - y_L
Δy = 4.12132
k_x := Δx_W/Δx
k_x = 235.702
k_y := Δy_W/Δy
k_y = 97.0563
T_SW := [k_x, 0, x_LW - k_x*x_L; 0, -k_y, y_HW + k_y*y_L; 0, 0, 1] = [235.702, 0, 200; 0, -97.0563, 354.416; 0, 0, 1]  # – матрица пересчета из ВСК в ОК
# Вычисляем оконные координаты вершин пирамиды
M_W := T_SW*P_XY
[x_a, x_b, x_c, x_d, x_e, x_f; y_a, y_b, y_c, y_d, y_e, y_f; q, q, q, q, q, q] := vectorize(round(M_W)) = [700, 200, 700, 367, 200, 367; 209, 354, 500, 100, 149, 197; 1, 1, 1, 1, 1, 1]
# Формируем массивы координат X и Y для рисования пирамиды
X := transpose([x_a, x_b, x_c, x_a, x_d, x_e, x_b, x_e, x_f, x_c, x_f, x_d])
Y := -transpose([y_a, y_b, y_c, y_a, y_d, y_e, y_b, y_e, y_f, y_c, y_f, y_d])
# Вычисляем оконные координаты вершин
# треугольника сечения Р1, Р2, Р3
TR_W := T_SW*TR_XY
[x_p1, x_p2, x_p3; y_p1, y_p2, y_p3; q, q, q] := vectorize(round(TR_W)) = [600, 450, 200; 176, 273, 200; 1, 1, 1]
# Формируем массивы координат Х и У для рисования
# сечения пирамиды
XC := transpose([x_p1, x_p2, x_p3, x_p1])
YC := -transpose([y_p1, y_p2, y_p3, y_p1])
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