A := transpose([5, 0, 0, 1])
B := transpose([0, 0, 0, 1])
C := transpose([0, 5, 0, 1])
a := transpose([3, 0, 10, 1])
b := transpose([0, 0, 10, 1])
c := transpose([0, 3, 10, 1])
# задаем координаты камеры(в сферической системе координат)
r := 10  # в радианах
# в градусах
φvg := 315
φv := φvg*π/180 = 5.49779
θvg := 45
θv := θvg*π/180 = 0.785398
# матрица координат пирамиды
xLW := 200
yLW := 100
PIR := augment(A, B, C, a, b, c) = [5, 0, 0, 3, 0, 0; 0, 0, 5, 0, 0, 3; 0, 0, 0, 10, 10, 10; 1, 1, 1, 1, 1, 1]
xHW := 700
yHW := 500
# формируем матрицу пересчета координат из мировой системы координат в видовую
Kview := [
    -sin(φv), cos(φv), 0, 0;
    -cos(θv)*cos(φv), -cos(θv)*sin(φv), sin(θv), 0;
    -sin(θv)*cos(φv), -sin(θv)*sin(φv), -cos(θv), r;
    0, 0, 0, 1
] = [0.707107, 0.707107, 0, 0; -0.5, 0.5, 0.707107, 0; -0.5, 0.5, -0.707107, 10; 0, 0, 0, 1]
# вычисляем координаты вершин пирамиды в  видовую системе координат
PIR_V := Kview*PIR = [
    3.53553, 0, 3.53553, 2.12132, 0, 2.12132;
    -2.5, 0, 2.5, 5.57107, 7.07107, 8.57107;
    7.5, 10, 12.5, 1.42893, 2.92893, 4.42893;
    1, 1, 1, 1, 1, 1
]
# Определяем координаты проекции вершин пирамиды на картинную плоскость
# (плоскость XvYv в видовой системе координат)
# вектор x - координат
XV := transpose(PIR_V)[:, 0] = [3.53553; 0; 3.53553; 2.12132; 0; 2.12132]
YV := transpose(PIR_V)[:, 1] = [-2.5; 0; 2.5; 5.57107; 7.07107; 8.57107]  # вектор у - координат
IV := transpose(PIR_V)[:, 3]  # вектор из единиц
# Формируем матрицу из координат проекций вершин пирамиды на картинную плоскость XvYv
Pxy := stack(transpose(XV), transpose(YV), transpose(IV))
# Опеределяем абаритную область проекции пирамиды на плоскость Xv Yv видовой СК
xL := min(XV) = 0
yH := max(YV) = 8.57107
xH := max(XV) = 3.53553
yL := min(YV) = -2.5
# Параметры, необходимые для формирования матрицы пересчета из видовой СК в оконную СК
Δx := xH - xL = 3.53553
ΔxW := xHW - xLW = 500
Δy := yH - yL = 11.0711
ΔyW := yHW - yLW = 400
ky := ΔyW/Δy = 36.1302
kx := ΔxW/Δx = 141.421
MATRPERESRCH := [kx, 0, xLW - kx*xL; 0, -ky, yHW + ky*yL; 0, 0, 1] = [141.421, 0, 200; 0, -36.1302, 409.674; 0, 0, 1]
M1w := MATRPERESRCH*Pxy
Mw := vectorize(round(M1w))
# Оконные координаты вершин пирамиды
[xa, xb, xc, xd, xe, xf; ya, yb, yc, yd, ye, yf; q, q, q, q, q, q] := Mw
X := transpose([xa, xb, xc, xa, xd, xe, xb, xe, xf, xc, xf, xd])
Y := -transpose([ya, yb, yc, ya, yd, ye, yb, ye, yf, yc, yf, yd])
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